<?xml version="1.0"?>
<?xml-stylesheet type="text/xsl" href="http://jsbsim.sourceforge.net/JSBSim.xsl"?>
<fdm_config name="E195" version="2.0" release="BETA"
   xmlns:xsi="http://www.w3.org/2001/XMLSchema-instance"
   xsi:noNamespaceSchemaLocation="http://jsbsim.sourceforge.net/JSBSim.xsd">

    <fileheader>
        <author>Narendran Muraleedharan</author>
        <author>Tobias Dammers</author>
        <author>Victor Hugo Martins de Oliveira</author>
        <filecreationdate>2011-08-08</filecreationdate>
        <version>$Revision: 3.0$</version>
        <description> Flight Dynamics Model for the Embraer 195 E2</description>
    </fileheader>

    <!-- UNIT CONVERSIONS :
    1 meter = 3.2 feet
    1 foot = 0.3048 m
    1 meter = 39.4 inches
    1 sq. m = 10.24 sq. ft.
    1 foot  = 12 inches -->

    <!--
    Maximum Weights
    - Maximum Ramp Weight - 62700Kg
    - Maximum Takeoff Weight - 61500Kg
    - Maximum Landing Weight - 54000Kg
    - Maximum Zero Fuel Weight - 51850Kg

    External Dimensions
    - Span over Swept Back Wingtip - 35.12 m (115 ft 2.7 in)
    - Height (maximum) - 10.78 m (35 ft 4.4 in)
    - Overall length - 41.60 m (136 ft 5.76 in.)

    Wing
    - Reference area - 103 m 2 (1108.68 ft 2 )
    - Reference aspect ratio - 9.4

    Fuselage
    - Total length - 41.6 m (136 ft 5.76 in)
    - Length of pressurized section - 34.3 m (112ft 6.36 in)

    Horizontal Tail
    - Span - 9.84 m (9 ft 10.1 in)
    - Area - 23.25 m 2 (250.26ft 2 )
    - Aspect ratio - 4.16

    Vertical Tail
    - Span - 5.27 m (9 ft 10.1 in)
    - Area - 16.20 m 2 (174.38 ft 2 )
    - Aspect ratio - 1.71

    -->

    <metrics>
        <!-- Calculated Wing Area (wikipedia) -->
        <wingarea  unit="M2">206</wingarea>
        <!-- Wingspan 26 m (wikipedia/FCOM) -->
        <wingspan  unit="FT" >115</wingspan>
        <!-- Wing Incidence = 3 (pure guesswork) -->
        <wing_incidence unit="DEG"> 3.0 </wing_incidence>
        <!-- Chord = 4.72 m from  -->
<!--         <chord     unit="M" >   3.665 </chord> -->
        <chord     unit="FT" >   17.85 </chord>
        <!-- Horizontal Tail Area = 18.9735 sq m (calculated on paper) -->
        <htailarea unit="FT2">  194.28864 </htailarea>
        <!-- Horizontal Tail Arm 13 m from FCOM 3-view -->
        <htailarm  unit="FT" >   55.13 </htailarm>
        <!-- Vertical Tail Area = 17.2975 sq m (calculated on paper) -->
        <vtailarea unit="FT2">  174.38 </vtailarea>
        <!-- Vertical Tail Arm 12.6 m from FCOM 3-view -->
        <vtailarm  unit="FT" > 53.44 </vtailarm>
        <location name="AERORP" unit="IN">
            <x> 0 </x>
            <y> 0 </y>
            <z> 0 </z>
        </location>
        <location name="EYEPOINT" unit="IN">
            <x> -562.35 </x>
            <y> 0 </y>
            <z> 1.14 </z>
        </location>
        <!-- Nose tip in AC file is 14.82m -->
        <location name="VRP" unit="IN">
            <x>40.16</x>
            <y> 0 </y>
            <z> 0 </z>
        </location>
    </metrics>

    <mass_balance>
        <ixx unit="SLUG*FT2">    662000 </ixx>
        <iyy unit="SLUG*FT2">    500000 </iyy>
        <izz unit="SLUG*FT2">    662000 </izz>
        <ixy unit="SLUG*FT2">         0 </ixy>
        <ixz unit="SLUG*FT2">         0 </ixz>
        <iyz unit="SLUG*FT2">         0 </iyz>
        <!-- Operational Empty Weight = 61,370 lbs from wikipedia -->
<!--         <emptywt unit="KG" > 27837 </emptywt> -->
        <!-- 11.754 Kg could be added if fuel tank is full or 136 people of 86Kg ea -->
        <emptywt unit="KG" > 36056 </emptywt>

        <location name="CG" unit="IN">
            <x>-42</x>
            <y>0.0</y>
            <z>0.0</z>
        </location>

        <pointmass name="Crew">
            <weight unit="LBS">360</weight>
            <location name="POINTMASS" unit="IN">
                <x>-562.35</x>
                <y>0</y>
                <z>1.14</z>
            </location>
        </pointmass>
        <pointmass name="Passengers Front">
            <weight unit="KG">0</weight> <!-- MAX -->
            <location name="POINTMASS" unit="IN">
                <x>-325.0</x>
                <y>0</y>
                <z>1.14</z>
            </location>
        </pointmass>
        <pointmass name="Passengers Back">
            <weight unit="KG">0</weight> <!-- MAX -->
            <location name="POINTMASS" unit="IN">
                <x>187.5</x>
                <y>0</y>
                <z>1.14</z>
            </location>
        </pointmass>
        <pointmass name="Cargo Front">
            <weight unit="LBS">0</weight> <!-- MAX 2375Kg -->
            <location name="POINTMASS" unit="IN">
                <x>-325.0</x>
                <y>0</y>
                <z>0</z>
            </location>
        </pointmass>
        <pointmass name="Cargo Back">
            <weight unit="LBS">0</weight> <!-- MAX 2555Kg -->
            <location name="POINTMASS" unit="IN">
                <x>189.38</x>
                <y>0</y>
                <z>0</z>
            </location>
        </pointmass>

    </mass_balance>

    <ground_reactions>

        <!-- Nose Gear Contact Point -->
        <contact type="BOGEY" name="NOSE_GEAR">
            <location unit="IN">
                <x> -486.01</x>
                <y> 0.00 </y>
                <z> -89.832 </z>
            </location>
            <static_friction>  1.50 </static_friction>
            <dynamic_friction> 0.50 </dynamic_friction>
            <rolling_friction> 0.005 </rolling_friction>
            <spring_coeff unit="LBS/FT"> 25000 </spring_coeff>
            <damping_coeff unit="LBS/FT/SEC"> 10000 </damping_coeff>
            <max_steer unit="DEG"> 70 </max_steer>
            <brake_group>NONE</brake_group>
            <retractable>1</retractable>
            <table name="CORNERING_COEFF" type="internal">
                <tableData> <!-- jsbsim-pacejka.py 3.0 0.03 2.85 1.4 1.03 1.4 -->
                    -90.0 -0.64429852792097750
                    -85.0 -0.65803784878515970
                    -80.0 -0.67367546323532410
                    -75.0 -0.69148835376736980
                    -70.0 -0.71179130570975040
                    -65.0 -0.73493212105552120
                    -60.0 -0.76127441823995780
                    -55.0 -0.79115479580170660
                    -50.0 -0.82478835297656280
                    -45.0 -0.86207184328003720
                    -40.0 -0.90218731471298370
                    -35.0 -0.94282786495867110
                    -30.0 -0.97874912755212280
                    -25.0 -0.99927325792190310
                    -20.0 -0.98471983766820350
                    -15.0 -0.90363984864415470
                    -10.0 -0.71770750752441240
                    -5.0 -0.40543502538657494
                    0.0  0.00000000000000000
                    5.0  0.40543502538657494
                    10.0  0.71770750752441240
                    15.0  0.90363984864415470
                    20.0  0.98471983766820350
                    25.0  0.99927325792190310
                    30.0  0.97874912755212280
                    35.0  0.94282786495867110
                    40.0  0.90218731471298370
                    45.0  0.86207184328003720
                    50.0  0.82478835297656280
                    55.0  0.79115479580170660
                    60.0  0.76127441823995780
                    65.0  0.73493212105552120
                    70.0  0.71179130570975040
                    75.0  0.69148835376736980
                    80.0  0.67367546323532410
                    85.0  0.65803784878515970
                    90.0  0.64429852792097750
                </tableData>
            </table>
        </contact>

        <!-- Left Main Gear Contact Point -->
        <contact type="BOGEY" name="LEFT_MAIN">
            <location unit="IN">
                <x>   53.44</x>
                <y> -101.258 </y>
                <z>  -93.772 </z>
            </location>
            <static_friction>  0.40 </static_friction>
            <dynamic_friction> 0.50 </dynamic_friction>
            <rolling_friction> 0.005 </rolling_friction>
            <spring_coeff unit="LBS/FT"> 48000 </spring_coeff>
            <damping_coeff unit="LBS/FT/SEC"> 24000 </damping_coeff>
            <max_steer unit="DEG">0</max_steer>
            <table name="CORNERING_COEFF" type="internal">
                <tableData> <!-- jsbsim-pacejka.py 3.0 0.06 2.8 0.4 1.03 0.4 -->
                    -90.0 -0.5760395836174765
                    -85.0 -0.5776440181093163
                    -80.0 -0.5803918992801416
                    -75.0 -0.5845010317001210
                    -70.0 -0.5902476568617109
                    -65.0 -0.5979865464058901
                    -60.0 -0.6081793463286825
                    -55.0 -0.6214348494943271
                    -50.0 -0.6385661913510731
                    -45.0 -0.6606706311692150
                    -40.0 -0.6892340269266316
                    -35.0 -0.7262408296125531
                    -30.0 -0.7741813043425955
                    -25.0 -0.8355026710967954
                    -20.0 -0.9097416834082445
                    -15.0 -0.9818532434458515
                    -10.0 -0.9824937511496707
                    -5.0 -0.7127565569007204
                    0.0  0.0000000000000000
                    5.0  0.7127565569007204
                    10.0  0.9824937511496707
                    15.0  0.9818532434458515
                    20.0  0.9097416834082445
                    25.0  0.8355026710967954
                    30.0  0.7741813043425955
                    35.0  0.7262408296125531
                    40.0  0.6892340269266316
                    45.0  0.6606706311692150
                    50.0  0.6385661913510731
                    55.0  0.6214348494943271
                    60.0  0.6081793463286825
                    65.0  0.5979865464058901
                    70.0  0.5902476568617109
                    75.0  0.5845010317001210
                    80.0  0.5803918992801416
                    85.0  0.5776440181093163
                    90.0  0.5760395836174765
                </tableData>
            </table>
            <brake_group>LEFT</brake_group>
            <retractable>1</retractable>
        </contact>

        <!-- Right Main Gear Contact Point -->
        <contact type="BOGEY" name="RIGHT_MAIN">
            <location unit="IN">
                <x>   53.44</x>
                <y> 101.258 </y>
                <z> -93.772 </z>
            </location>
            <static_friction>  0.40 </static_friction>
            <dynamic_friction> 0.50 </dynamic_friction>
            <rolling_friction> 0.005 </rolling_friction>
            <spring_coeff unit="LBS/FT"> 48000 </spring_coeff>
            <damping_coeff unit="LBS/FT/SEC"> 24000 </damping_coeff>
            <max_steer unit="DEG">0</max_steer>
            <table name="CORNERING_COEFF" type="internal">
                <tableData> <!-- jsbsim-pacejka.py 3.0 0.06 2.8 0.4 1.03 0.4 -->
                    -90.0 -0.5760395836174765
                    -85.0 -0.5776440181093163
                    -80.0 -0.5803918992801416
                    -75.0 -0.5845010317001210
                    -70.0 -0.5902476568617109
                    -65.0 -0.5979865464058901
                    -60.0 -0.6081793463286825
                    -55.0 -0.6214348494943271
                    -50.0 -0.6385661913510731
                    -45.0 -0.6606706311692150
                    -40.0 -0.6892340269266316
                    -35.0 -0.7262408296125531
                    -30.0 -0.7741813043425955
                    -25.0 -0.8355026710967954
                    -20.0 -0.9097416834082445
                    -15.0 -0.9818532434458515
                    -10.0 -0.9824937511496707
                    -5.0 -0.7127565569007204
                    0.0  0.0000000000000000
                    5.0  0.7127565569007204
                    10.0  0.9824937511496707
                    15.0  0.9818532434458515
                    20.0  0.9097416834082445
                    25.0  0.8355026710967954
                    30.0  0.7741813043425955
                    35.0  0.7262408296125531
                    40.0  0.6892340269266316
                    45.0  0.6606706311692150
                    50.0  0.6385661913510731
                    55.0  0.6214348494943271
                    60.0  0.6081793463286825
                    65.0  0.5979865464058901
                    70.0  0.5902476568617109
                    75.0  0.5845010317001210
                    80.0  0.5803918992801416
                    85.0  0.5776440181093163
                    90.0  0.5760395836174765
                </tableData>
            </table>
            <brake_group>RIGHT</brake_group>
            <retractable>1</retractable>
        </contact>

        <!-- Left Wing Tip Contact Point -->
        <contact type="STRUCTURE" name="LEFT_WING_TIP">
            <location unit="IN">
                <x>  219.85</x>
                <y> -490.924 </y>
                <z> 10.64 </z>
            </location>
            <static_friction>  0.9 </static_friction>
            <dynamic_friction> 0.8 </dynamic_friction>
            <spring_coeff unit="LBS/FT">      200000.00 </spring_coeff>
            <damping_coeff unit="LBS/FT/SEC"> 10000.00 </damping_coeff>
            <brake_group> NONE </brake_group>
            <retractable>0</retractable>
        </contact>

        <!-- Right Wing Tip Contact Point -->
        <contact type="STRUCTURE" name="RIGHT_WING_TIP">
            <location unit="IN">
                <x>  219.85</x>
                <y> 490.924 </y>
                <z> 10.64 </z>
            </location>
            <static_friction>  0.9 </static_friction>
            <dynamic_friction> 0.8 </dynamic_friction>
            <spring_coeff unit="LBS/FT">      200000.00 </spring_coeff>
            <damping_coeff unit="LBS/FT/SEC"> 10000.00 </damping_coeff>
            <brake_group> NONE </brake_group>
            <retractable>0</retractable>
        </contact>

        <!-- Tail (in case of a tail strike) Contact Point -->
        <contact type="STRUCTURE" name="TAIL_STRIKE">
            <location unit="IN">
                <x>813.35 </x>
                <y> 0 </y>
                <z> 45.62914 </z>
            </location>
            <static_friction>  0.95 </static_friction>
            <dynamic_friction> 0.9 </dynamic_friction>
            <spring_coeff unit="LBS/FT">      200000.00 </spring_coeff>
            <damping_coeff unit="LBS/FT/SEC"> 10000.00 </damping_coeff>
            <brake_group> NONE </brake_group>
            <retractable>0</retractable>
        </contact>

        <!-- Nose (used for Ditching) Contact Point -->
        <contact type="STRUCTURE" name="TAIL_STRIKE">
            <location unit="IN">
                <x> -702.30 </x>
                <y> 0 </y>
                <z> -28.762 </z>
            </location>
            <static_friction>  0.95 </static_friction>
            <dynamic_friction> 0.9 </dynamic_friction>
            <spring_coeff unit="LBS/FT">      200000.00 </spring_coeff>
            <damping_coeff unit="LBS/FT/SEC"> 10000.00 </damping_coeff>
            <brake_group> NONE </brake_group>
            <retractable>0</retractable>
        </contact>

    </ground_reactions>

    <!-- 2 x General Electric CF34-8E Engines -->
    <propulsion>

        <engine file="GE_CF34-10E-L">
            <location unit="IN">
                <x> -101.78  </x>
                <y> -157.6 </y>
                <z> -43.34 </z>
            </location>
            <orient unit="DEG">
                <pitch> 0.00 </pitch>
                <roll>   0.00 </roll>
                <yaw>   0.00 </yaw>
            </orient>
            <feed>0</feed>
            <thruster file="direct">
                <location unit="IN">
                    <x> -101.78  </x>
                    <y> -157.6 </y>
                    <z> -43.34 </z>
                </location>
                <orient unit="DEG">
                    <pitch>  1.10 </pitch>
                    <roll>   0.00 </roll>
                    <yaw>   -1.00 </yaw>
                </orient>
            </thruster>
        </engine>

        <engine file="GE_CF34-10E-R">
            <location unit="IN">
                <x> -101.78  </x>
                <y> 157.6 </y>
                <z> -43.34 </z>
            </location>
            <orient unit="DEG">
                <pitch> 0.00 </pitch>
                <roll>   0.00 </roll>
                <yaw>   0.00 </yaw>
            </orient>
            <feed>1</feed>
            <thruster file="direct">
                <location unit="IN">
                    <x> -101.78  </x>
                    <y> 157.6 </y>
                    <z> -43.34 </z>
                </location>
                <orient unit="DEG">
                    <pitch> 1.10 </pitch>
                    <roll>  0.00 </roll>
                    <yaw>   1.00 </yaw>
                </orient>
            </thruster>
        </engine>

        <!-- Wing Fuel Tank LEFT MAX 2190Kg-->
        <tank type="FUEL" number="0">
            <location unit="IN">
                <x>  0.0 </x>
                <y> -133.96 </y>
                <z> -5.91 </z>
            </location>
            <capacity unit="KG"> 2190 </capacity>
            <contents unit="KG"> 2100 </contents>
        </tank>

        <!-- Wing Fuel Tank RIGHT MAX 2190Kg -->
        <tank type="FUEL" number="1">
            <location unit="IN">
                <x>   0.0 </x>
                <y> 133.96 </y>
                <z> -5.91 </z>
            </location>
            <capacity unit="KG"> 2190 </capacity>
            <contents unit="KG"> 2100 </contents>
        </tank>

        <!-- Center Fuel Tank MAX 9310Kg -->
        <tank type="FUEL" number="3">
            <location unit="IN">
                <x>   0.0 </x>
                <y> 0 </y>
                <z> -5.91 </z>
            </location>
            <capacity unit="KG"> 9310 </capacity>
            <contents unit="KG"> 0 </contents>
        </tank>

    </propulsion>

    <flight_control file="FDM/flight-control.xml" />
    <aerodynamics file="FDM/aerodynamics.xml" />

    <external_reactions>
        <force name="tractor" frame="BODY">
            <location unit="IN">
                <x> -486.01</x>
                <y> 0.00 </y>
                <z> -89.832 </z>
            </location>
            <direction>
                <x>1.0</x>
                <y>0.0</y>
                <z>0.0</z>
            </direction>
        </force>
    </external_reactions>
</fdm_config>
