<?xml version="1.0"?>

<flight_control name="FCS: E-Jet-Family">

    <property value="0">fcs/mfs1-pos-norm</property>
    <property value="0">fcs/mfs2-pos-norm</property>
    <property value="0">fcs/mfs3-pos-norm</property>
    <property value="0">fcs/mfs4-pos-norm</property>
    <property value="0">fcs/mfs5-pos-norm</property>
    <property value="0">fcs/mfs6-pos-norm</property>
    <property value="0">fcs/mfs7-pos-norm</property>
    <property value="0">fcs/mfs8-pos-norm</property>
    <property value="0">fcs/mfs9-pos-norm</property>
    <property value="0">fcs/mfs10-pos-norm</property>

    <property value="0">fcs/steer-nose-deg[0]</property>


<!--     <property>/systems/actuators/elevator/pcu[0]/active</property> -->
    <property value="1">/systems/actuators/elevator/pcu[0]/active</property>
    <property value="1">/systems/actuators/elevator/pcu[1]/active</property>
    <property value="1">/systems/actuators/elevator/pcu[2]/active</property>
    <property value="1">/systems/actuators/elevator/pcu[3]/active</property>

    <!-- Aileron / rudder PCUs — powered by default; HydraulicModule will override -->
    <property value="1">/systems/actuators/aileron/pcu[0]/active</property>
    <property value="1">/systems/actuators/aileron/pcu[1]/active</property>
    <property value="1">/systems/actuators/aileron/pcu[2]/active</property>
    <property value="1">/systems/actuators/aileron/pcu[3]/active</property>
    <property value="1">/systems/actuators/rudder/pcu[0]/active</property>
    <property value="1">/systems/actuators/rudder/pcu[1]/active</property>

    <!-- FBW elevator command — written by FlightDynamicsModule each frame -->
    <property value="0">/fcs/elevator-cmd-fbw</property>

    <!-- Yaw damper enable flag (0 = disabled; future yaw-damper module writes 1) -->
    <property value="0">fcs/yaw-damper-enable</property>

    <!-- aero-config/coefficients — originally set by FlightGear Nasal scripts.
         Values restored from commented-out hints in aerodynamics.xml.
         Coefficients that multiply a table (drag-alpha/mach/beta) use 1.0 (neutral).
         Cross-coupling terms (bank-*, yaw-elevator) use 0 until tuned. -->

    <!-- Lift coefficients (CLde, CLdhs) — 1.0 because aerodynamics.xml already has ×0.5 factor -->
    <property value="1">aero-config/coefficients/lift-elevator</property>
    <property value="1">aero-config/coefficients/lift-hstab</property>

    <!-- Drag coefficients — from commented-out hints in aerodynamics.xml -->
    <property value="0.01">aero-config/coefficients/drag-parasitic</property>
    <property value="1">aero-config/coefficients/drag-alpha</property>    <!-- table already scaled -->
    <property value="0.02">aero-config/coefficients/drag-induced</property>
    <property value="1">aero-config/coefficients/drag-mach</property>     <!-- table already scaled -->
    <property value="1">aero-config/coefficients/drag-beta</property>     <!-- table already scaled -->
    <property value="0.004">aero-config/coefficients/drag-flap</property>
    <property value="0.0015">aero-config/coefficients/drag-slat</property>
    <property value="0.004">aero-config/coefficients/drag-gear</property>
    <property value="0.003">aero-config/coefficients/drag-mfs</property>
    <property value="0.005">aero-config/coefficients/drag-elevator</property>
    <property value="0.005">aero-config/coefficients/drag-hstab</property>

    <!-- Cross-coupling moments — small; set to 0 until aerodynamic tuning -->
    <property value="0">aero-config/coefficients/bank-rudder</property>
    <property value="0">aero-config/coefficients/bank-elevator</property>
    <property value="0">aero-config/coefficients/yaw-elevator</property>

    <!-- Yaw damper gains -->
    <property value="1">aero-config/coefficients/yaw-damper-beta</property>
    <property value="1">aero-config/coefficients/yaw-damper-rate</property>

    <!-- Ground speed (FlightGear property; JSBSim does not auto-create before RunIC) -->
    <property value="0">/velocities/groundspeed-kt</property>

    <!-- Gear unit properties — created by ground_reactions but needed by FCS at load time -->
    <property value="0">gear/unit[0]/castered</property>
    <property value="0">gear/unit[0]/steering-angle-deg</property>


    <!-- Autopilot / autoflight — zero until AP module is implemented -->
    <property value="0">/it-autoflight/internal/aileron</property>
    <property value="0">/it-autoflight/internal/rudder</property>
    <property value="0">/autopilot/autobrake/output-brake</property>
    <property value="0">/autopilot/autobrake/engaged</property>

    <!-- FADEC throttle commands — written by FlightDynamicsModule each frame -->
    <property value="0">/fadec/throttle-cmd[0]</property>
    <property value="0">/fadec/throttle-cmd[1]</property>

    <!-- Hydraulic systems — pressurized by default; HydraulicModule will override -->
    <property value="1">/systems/hydraulic/system[0]/pressurized</property>
    <property value="1">/systems/hydraulic/system[1]/pressurized</property>
    <property value="3000">/systems/hydraulic/system[0]/pressure-psi</property>
    <property value="3000">/systems/hydraulic/system[1]/pressure-psi</property>
    <property value="1">/systems/hydraulic/system[0]/emergency-accumulator</property>
    <property value="1">/systems/hydraulic/system[1]/emergency-accumulator</property>

    <!-- MFS (spoiler) commands — written by FlightDynamicsModule each frame -->
    <property value="0">/fcs/mfs-left-outboard-cmd-norm</property>
    <property value="0">/fcs/mfs-left-inboard-cmd-norm</property>
    <property value="0">/fcs/mfs-right-outboard-cmd-norm</property>
    <property value="0">/fcs/mfs-right-inboard-cmd-norm</property>

    <!-- Flight controls — FlightGear inputs; FlightDynamicsModule writes these each frame -->
    <property value="0">/controls/flight/rudder</property>
    <property value="0">/controls/flight/flaps</property>

    <!-- Gear / brakes / tiller -->
    <property value="0">/controls/gear/brake-left</property>
    <property value="0">/controls/gear/brake-right</property>
    <property value="0">/controls/gear/brake-parking</property>
    <property value="0">/controls/gear/enable-tiller</property>
    <property value="0">/controls/gear/tiller-pushed</property>
    <property value="0">/controls/gear/tiller-cmd-norm</property>


    <property value="0">fcs/left-aileron-master</property>
    <property value="0">fcs/right-aileron-master</property>
    <property value="0">fcs/elevator-rh-master</property>
    <property value="0">fcs/elevator-lh-master</property>
    <property value="0">fcs/rudder-master</property>


    <!-- Ground services / autopush — not used in our sim -->
    <property value="0">/services/chocks</property>
    <property value="0">/sim/model/autopush/connected</property>
    <property value="0">/sim/model/autopush/autopush-cmd-norm</property>
    <property value="0">/options/controls/realistic-nose-wheel-steering</property>

    <channel name="Pitch">
        <fcs_function name="Elevator Unpowered">
            <function>
                <table>
                    <independentVar lookup="row">aero/qbar-psf</independentVar>
                    <tableData>
                         0 1
                         1 1
                        15 0.5
                        50 0.1
                    </tableData>
                </table>
            </function>
            <output>fcs/elevator-unpowered</output>
        </fcs_function>

       <!-- <switch>
            <output>fcs/elevator-lh-cmd-powered</output>
            <default value="fcs/elevator-unpowered" />
            <test logic="OR" value="fcs/elevator-cmd-fbw">
                /systems/actuators/elevator/pcu[0]/active &gt; 0
                /systems/actuators/elevator/pcu[1]/active &gt; 0
            </test>
        </switch>

        <actuator name="Elevator Master">
            <input>fcs/elevator-lh-cmd-powered</input>
            <rate_limit>2</rate_limit>
            <output>fcs/elevator-lh-master</output>
        </actuator>-->

        <fcs_function name="fbw/elevator/stall-prot/min">
            <function>
                <ifthen>
                    <and>
                        <eq>
                            <property>gear/unit[1]/WOW</property>
                            <value>0</value>
                        </eq>
                        <eq>
                            <property>gear/unit[2]/WOW</property>
                            <value>0</value>
                        </eq>
                    </and>

                    <table>
                        <independentVar lookup="row">aero/alpha-wing-rad</independentVar>
                        <tableData>
                            0.00   -1.0
                            0.11   -1.0
                            0.30    1.0
                        </tableData>
                    </table>

                    <value>-1.0</value>
                </ifthen>
            </function>
            <output>fbw/elevator/stall-prot/min</output>
        </fcs_function>

        <aerosurface_scale name="Elevator Control">
            <input>fcs/elevator-lh-master</input>
            <range>
                <min> -0.25 </min>
                <max>  0.25 </max>
            </range>
            <output>fcs/elevator-lh-pos-rad</output>
        </aerosurface_scale>

        <aerosurface_scale name="Elevator Normalization">
            <input>fcs/elevator-lh-pos-rad</input>
            <domain>
                <min> -0.25 </min>
                <max>  0.25 </max>
            </domain>
            <range>
                <min> -1 </min>
                <max>  1 </max>
            </range>
            <output>fcs/elevator-lh-pos-norm</output>
        </aerosurface_scale>

       <!-- <switch>
            <output>fcs/elevator-rh-cmd-powered</output>
            <default value="fcs/elevator-unpowered" />
            <test logic="OR" value="fcs/elevator-cmd-fbw">
                /systems/actuators/elevator/pcu[2]/active &gt; 0
                /systems/actuators/elevator/pcu[3]/active &gt; 0
            </test>
        </switch>

        <actuator name="Elevator Master">
            <input>fcs/elevator-rh-cmd-powered</input>
            <rate_limit>2</rate_limit>
            <output>fcs/elevator-rh-master</output>
        </actuator>-->

        <aerosurface_scale name="Elevator Control">
            <input>fcs/elevator-rh-master</input>
            <range>
                <min> -0.25 </min>
                <max>  0.25 </max>
            </range>
            <output>fcs/elevator-rh-pos-rad</output>
        </aerosurface_scale>

        <aerosurface_scale name="Elevator Normalization">
            <input>fcs/elevator-rh-pos-rad</input>
            <domain>
                <min> -0.25 </min>
                <max>  0.25 </max>
            </domain>
            <range>
                <min> -1 </min>
                <max>  1 </max>
            </range>
            <output>fcs/elevator-rh-pos-norm</output>
        </aerosurface_scale>


        <aerosurface_scale name="HStab Control">
            <input>fcs/pitch-trim-cmd-norm</input>
            <range>
                <min> -0.25 </min>
                <max>  0.25 </max>
            </range>
            <output>fcs/hstab-pos-rad</output>
        </aerosurface_scale>

        <aerosurface_scale name="HStab Normalization">
            <input>fcs/hstab-pos-rad</input>
            <domain>
                <min> -0.25 </min>
                <max>  0.25 </max>
            </domain>
            <range>
                <min> -1 </min>
                <max>  1 </max>
            </range>
            <output>fcs/hstab-pos-norm</output>
        </aerosurface_scale>

        <aerosurface_scale name="HStab Degrees">
            <input>fcs/hstab-pos-rad</input>
            <domain>
                <min> -0.25 </min>
                <max>  0.25 </max>
            </domain>
            <range>
                <min> -14.3239448782705 </min>
                <max>  14.3239448782705 </max>
            </range>
            <output>fcs/hstab-pos-deg</output>
        </aerosurface_scale>
    </channel>

    <channel name="Roll">
        <summer name="fcs/aileron-sum">
            <input>it-autoflight/internal/aileron</input>
            <output>fcs/aileron-sum</output>
        </summer>


        <summer name="Roll Trim Sum">
            <input>fcs/aileron-sum</input>
            <input>fcs/roll-trim-cmd-norm</input>
            <clipto>
                <min> -1 </min>
                <max>  1 </max>
            </clipto>
        </summer>

        <fcs_function name="Aileron Unpowered">
            <function>
                <table>
                    <independentVar lookup="row">aero/qbar-psf</independentVar>
                    <tableData>
                         0 1
                         1 1
                        15 0.5
                        50 0.1
                    </tableData>
                </table>
            </function>
            <output>fcs/aileron-unpowered</output>
        </fcs_function>

       <!-- <switch>
            <output>fcs/left-aileron-cmd-powered</output>
            <default value="fcs/aileron-unpowered" />
            <test logic="OR" value="fcs/roll-trim-sum">
                /systems/actuators/aileron/pcu[0]/active &gt; 0
                /systems/actuators/aileron/pcu[1]/active &gt; 0
            </test>
        </switch>

        <actuator name="Left Aileron Master">
            <input>fcs/left-aileron-cmd-powered</input>
            <rate_limit>2</rate_limit>
            <output>fcs/left-aileron-master</output>
        </actuator>

        <switch>
            <output>fcs/right-aileron-cmd-powered</output>
            <default value="fcs/aileron-unpowered" />
            <test logic="OR" value="-fcs/roll-trim-sum">
                /systems/actuators/aileron/pcu[2]/active &gt; 0
                /systems/actuators/aileron/pcu[3]/active &gt; 0
            </test>
        </switch>

        <actuator name="Right Aileron Master">
            <input>fcs/right-aileron-cmd-powered</input>
            <rate_limit>2</rate_limit>
            <output>fcs/right-aileron-master</output>
        </actuator>-->


        <aerosurface_scale name="Left Aileron Control">
            <input>fcs/left-aileron-master</input>
            <range>
                <min> -0.25 </min>
                <max>  0.25 </max>
            </range>
            <output>fcs/left-aileron-pos-rad</output>
        </aerosurface_scale>

        <aerosurface_scale name="Right Aileron Control">
            <input>fcs/right-aileron-master</input>
            <range>
                <min> -0.25 </min>
                <max>  0.25 </max>
            </range>
            <output>fcs/right-aileron-pos-rad</output>
        </aerosurface_scale>

        <aerosurface_scale name="left aileron normalization">
            <input>fcs/left-aileron-pos-rad</input>
            <domain>
                <min> -0.25 </min>
                <max>  0.25 </max>
            </domain>
            <range>
                <min> -1 </min>
                <max>  1 </max>
            </range>
            <output>fcs/left-aileron-pos-norm</output>
        </aerosurface_scale>

        <aerosurface_scale name="right aileron normalization">
            <input>fcs/right-aileron-pos-rad</input>
            <domain>
                <min> -0.25 </min>
                <max>  0.25 </max>
            </domain>
            <range>
                <min> -1 </min>
                <max>  1 </max>
            </range>
            <output>fcs/right-aileron-pos-norm</output>
        </aerosurface_scale>

    </channel>

    <channel name="Yaw">
        <summer name="Rudder Command Sum">
            <input>/controls/flight/rudder</input>
            <input>/it-autoflight/internal/rudder</input>
            <input>fcs/yaw-trim-cmd-norm</input>
            <clipto>
                <min> -0.55 </min>
                <max>  0.55 </max>
            </clipto>
        </summer>

        <scheduled_gain name="Yaw Damper Rate">
            <input>velocities/r-aero-rad_sec</input>
            <table>
                <independentVar lookup="row">velocities/ve-kts</independentVar>
                <tableData>
                    30     0.00
                    60     2.00
                </tableData>
            </table>
            <gain>fcs/yaw-damper-enable</gain>
        </scheduled_gain>

        <scheduled_gain name="Yaw Damper Beta">
            <input>aero/beta-rad</input>
            <table>
                <independentVar>aero/qbar-psf</independentVar>
                <tableData>
                    3.0000   0.0000
                    11.0000   1.0000
                </tableData>
            </table>
            <gain>aero-config/coefficients/yaw-damper-beta</gain>
        </scheduled_gain>

        <scheduled_gain name="Yaw Damper">
            <input>velocities/r-aero-rad_sec</input>
            <table>
                <independentVar>velocities/mach</independentVar>
                <tableData>
                    0.00        0.0
                    0.10        0.0
                    0.11        1.0
                </tableData>
            </table>
            <gain>aero-config/coefficients/yaw-damper-rate</gain>
        </scheduled_gain>

        <summer name="Yaw Damper Sum">
            <input>fcs/yaw-damper</input>
            <input>fcs/yaw-damper-beta</input>
        </summer>

        <scheduled_gain name="Yaw Damper Final">
            <input>fcs/yaw-damper-sum</input>
            <table>
                <independentVar>velocities/mach</independentVar>
                <tableData>
                    0.00        0.0
                    0.10        0.0
                    0.11        1.0
                </tableData>
            </table>
            <gain>fcs/yaw-damper-enable</gain>
        </scheduled_gain>

        <summer name="Rudder Sum">
            <input>fcs/rudder-command-sum</input>
            <input>fcs/yaw-damper-final</input>
            <clipto>
                <min> -1 </min>
                <max>  1 </max>
            </clipto>
        </summer>

     <!--   <switch>
            <output>fcs/rudder-rate-limit</output>
            <default value="0" />
            <test logic="OR" value="2">
                /systems/actuators/rudder/pcu[0]/active &gt; 0
                /systems/actuators/rudder/pcu[1]/active &gt; 0
            </test>
        </switch>

        <actuator>
            <input>fcs/rudder-sum</input>
            <rate_limit>fcs/rudder-rate-limit</rate_limit>
            <output>fcs/rudder-master</output>
        </actuator>-->

        <aerosurface_scale name="Rudder Control">
            <input>fcs/rudder-master</input>
            <range>
                <min> -0.530 </min>
                <max>  0.530 </max>
            </range>
            <output>fcs/rudder-pos-rad</output>
        </aerosurface_scale>

        <aerosurface_scale name="rudder normalization">
            <input>fcs/rudder-pos-rad</input>
            <domain>
                <min> -0.530 </min>
                <max>  0.530 </max>
            </domain>
            <range>
                <min> -1 </min>
                <max>  1 </max>
            </range>
            <output>fcs/rudder-pos-norm</output>
        </aerosurface_scale>

    </channel>

    <channel name="Slats">

        <!--Set slats according to http://www.smartcockpit.com/docs/Embraer_190-Flight_Controls.pdf page 4-->
        <fcs_function name="Slats Cmd">
            <function>
                <table>
                    <independentVar>/controls/flight/flaps</independentVar>
                    <tableData>
                        0.000   0
                        0.125  15
                        0.250  15
                        0.375  15
                        0.500  25
                        0.625  25
                        0.750  25
                    </tableData>
                </table>
            </function>
            <output>fcs/slat-cmd-int-deg</output>
        </fcs_function>

        <kinematic name="Slats Control">
            <input>fcs/slat-cmd-int-deg</input>
            <noscale/>
            <traverse>
                <setting>
                    <position>0.0</position>
                    <time>0.0000</time>
                </setting>
                <setting>
                    <position>15</position>
                    <time>2.0000</time>
                </setting>
                <setting>
                    <position>25</position>
                    <time>1.5000</time>
                </setting>
            </traverse>
            <output>fcs/slat-pos-deg</output>
        </kinematic>

        <aerosurface_scale name="slat normalization">
            <input>fcs/slat-pos-deg</input>
            <domain>
                <min>  0 </min>
                <max> 25 </max>
            </domain>
            <range>
                <min> 0 </min>
                <max> 1 </max>
            </range>
            <output>fcs/slat-pos-norm</output>
        </aerosurface_scale>

    </channel>


    <channel name="Flaps">


        <!-- Set flaps according to http://www.smartcockpit.com/docs/Embraer_190-Flight_Controls.pdf page 4-->
        <fcs_function name="Flaps Cmd">
            <function>
                <table>
                    <independentVar>/controls/flight/flaps</independentVar>
                    <tableData>
                        0.000   0
                        0.125   5
                        0.250  10
                        0.375  20
                        0.500  20
                        0.625  20
                        0.750  35
                    </tableData>
                </table>
            </function>
            <output>fcs/flap-cmd-int-deg</output>
        </fcs_function>

        <kinematic name="Flaps Control">
            <input>fcs/flap-cmd-int-deg</input>
            <noscale/>
            <traverse>
                <setting>
                    <position>0</position>
                    <time>0.0000</time>
                </setting>
                <setting>
                    <position>5</position>
                    <time>2.0000</time>
                </setting>
                <setting>
                    <position>10</position>
                    <time>2.0000</time>
                </setting>
                <setting>
                    <position>20</position>
                    <time>2.0000</time>
                </setting>
                <setting>
                    <position>35</position>
                    <time>3.0000</time>
                </setting>
            </traverse>
            <output>fcs/flap-pos-deg</output>
        </kinematic>

        <aerosurface_scale name="flap normalization">
            <input>fcs/flap-pos-deg</input>
            <domain>
                <min>  0 </min>
                <max> 35 </max>
            </domain>
            <range>
                <min> 0 </min>
                <max> 1 </max>
            </range>
            <output>fcs/flap-pos-norm</output>
        </aerosurface_scale>

    </channel>

    <!--<channel name="Landing Gear">
        <switch>
            <default value="0" />
            <test logic="OR" value="0.066666667">
                /systems/hydraulic/system[0]/pressurized &gt; 0
                /systems/hydraulic/system[1]/pressurized &gt; 0
            </test>
            <output>gear/extend-retract-rate</output>
        </switch>
        <actuator name="Gear Control">
            <input>gear/gear-cmd-norm</input>
            <rate_limit>gear/extend-retract-rate</rate_limit>
            <output>gear/gear-pos-norm</output>
        </actuator>

    </channel>-->

    <channel name="Steering">

        <actuator name="Gear Nose Actuator">
            <input>fcs/steer-nose-deg[0]</input>
            <rate_limit>70</rate_limit>
            <output>fcs/steer-pos-deg[0]</output>
        </actuator>

    </channel>

    <!--<channel name="MFS Left Outboard">
        <switch name="MFS1 Powered">
            <default value="0" />
            <test logic="OR" value="fcs/mfs-left-outboard-cmd-norm">
                /systems/hydraulic/system[1]/pressurized &gt; 0
            </test>
            <output>fcs/mfs1-powered</output>
        </switch>
        <kinematic name="MFS1 Control">
            <input>fcs/mfs-left-outboard-cmd-norm</input>
            <traverse>
                <setting>
                    <position> 0 </position>
                    <time>     0 </time>
                </setting>
                <setting>
                    <position> 1 </position>
                    <time>     1 </time>
                </setting>
            </traverse>
            <output>fcs/mfs1-pos-norm</output>
        </kinematic>
        <switch name="MFS2 Powered">
            <default value="0" />
            <test logic="OR" value="fcs/mfs-left-outboard-cmd-norm">
                /systems/hydraulic/system[0]/pressurized &gt; 0
            </test>
            <output>fcs/mfs2-powered</output>
        </switch>
        <kinematic name="MFS2 Control">
            <input>fcs/mfs2-powered</input>
            <traverse>
                <setting>
                    <position> 0 </position>
                    <time>     0 </time>
                </setting>
                <setting>
                    <position> 1 </position>
                    <time>     1 </time>
                </setting>
            </traverse>
            <output>fcs/mfs2-pos-norm</output>
        </kinematic>
        <switch name="MFS3 Powered">
            <default value="0" />
            <test logic="OR" value="fcs/mfs-left-outboard-cmd-norm">
                /systems/hydraulic/system[0]/pressurized &gt; 0
            </test>
            <output>fcs/mfs3-powered</output>
        </switch>
        <kinematic name="MFS3 Control">
            <input>fcs/mfs3-powered</input>
            <traverse>
                <setting>
                    <position> 0 </position>
                    <time>     0 </time>
                </setting>
                <setting>
                    <position> 1 </position>
                    <time>     1 </time>
                </setting>
            </traverse>
            <output>fcs/mfs3-pos-norm</output>
        </kinematic>
    </channel>
    <channel name="MFS Left Inboard">
        <switch name="MFS4 Powered">
            <default value="0" />
            <test logic="OR" value="fcs/mfs-left-inboard-cmd-norm">
                /systems/hydraulic/system[0]/pressurized &gt; 0
            </test>
            <output>fcs/mfs4-powered</output>
        </switch>
        <kinematic name="MFS4 Control">
            <input>fcs/mfs4-powered</input>
            <traverse>
                <setting>
                    <position> 0 </position>
                    <time>     0 </time>
                </setting>
                <setting>
                    <position> 1 </position>
                    <time>     1 </time>
                </setting>
            </traverse>
            <output>fcs/mfs4-pos-norm</output>
        </kinematic>
        <switch name="MFS5 Powered">
            <default value="0" />
            <test logic="OR" value="fcs/mfs-left-inboard-cmd-norm">
                /systems/hydraulic/system[1]/pressurized &gt; 0
            </test>
            <output>fcs/mfs-left-inboard-powered</output>
        </switch>
        <kinematic name="MFS5 Control">
            <input>fcs/mfs-left-inboard-powered</input>
            <traverse>
                <setting>
                    <position> 0 </position>
                    <time>     0 </time>
                </setting>
                <setting>
                    <position> 1 </position>
                    <time>     1 </time>
                </setting>
            </traverse>
            <output>fcs/mfs5-pos-norm</output>
        </kinematic>
    </channel>
    <channel name="MFS Right Outboard">
        <switch name="MFS10 Powered">
            <default value="0" />
            <test logic="OR" value="fcs/mfs-right-outboard-cmd-norm">
                /systems/hydraulic/system[1]/pressurized &gt; 0
            </test>
            <output>fcs/mfs-right-outboard-powered</output>
        </switch>
        <kinematic name="MFS10 Control">
            <input>fcs/mfs-right-outboard-powered</input>
            <traverse>
                <setting>
                    <position> 0 </position>
                    <time>     0 </time>
                </setting>
                <setting>
                    <position> 1 </position>
                    <time>     1 </time>
                </setting>
            </traverse>
            <output>fcs/mfs10-pos-norm</output>
        </kinematic>
        <switch name="MFS9 Powered">
            <default value="0" />
            <test logic="OR" value="fcs/mfs-right-outboard-cmd-norm">
                /systems/hydraulic/system[0]/pressurized &gt; 0
            </test>
            <output>fcs/mfs-right-outboard-powered</output>
        </switch>
        <kinematic name="MFS9 Control">
            <input>fcs/mfs-right-outboard-powered</input>
            <traverse>
                <setting>
                    <position> 0 </position>
                    <time>     0 </time>
                </setting>
                <setting>
                    <position> 1 </position>
                    <time>     1 </time>
                </setting>
            </traverse>
            <output>fcs/mfs9-pos-norm</output>
        </kinematic>
        <switch name="MFS8 Powered">
            <default value="0" />
            <test logic="OR" value="fcs/mfs-right-outboard-cmd-norm">
                /systems/hydraulic/system[0]/pressurized &gt; 0
            </test>
            <output>fcs/mfs-right-outboard-powered</output>
        </switch>
        <kinematic name="MFS8 Control">
            <input>fcs/mfs-right-outboard-powered</input>
            <traverse>
                <setting>
                    <position> 0 </position>
                    <time>     0 </time>
                </setting>
                <setting>
                    <position> 1 </position>
                    <time>     1 </time>
                </setting>
            </traverse>
            <output>fcs/mfs8-pos-norm</output>
        </kinematic>
    </channel>
    <channel name="MFS Right Inboard">
        <switch name="MFS7 Powered">
            <default value="0" />
            <test logic="OR" value="fcs/mfs-right-inboard-cmd-norm">
                /systems/hydraulic/system[0]/pressurized &gt; 0
            </test>
            <output>fcs/mfs-right-inboard-powered</output>
        </switch>
        <kinematic name="MFS7 Control">
            <input>fcs/mfs-right-inboard-powered</input>
            <traverse>
                <setting>
                    <position> 0 </position>
                    <time>     0 </time>
                </setting>
                <setting>
                    <position> 1 </position>
                    <time>     1 </time>
                </setting>
            </traverse>
            <output>fcs/mfs7-pos-norm</output>
        </kinematic>
        <switch name="MFS6 Powered">
            <default value="0" />
            <test logic="OR" value="fcs/mfs-right-inboard-cmd-norm">
                /systems/hydraulic/system[1]/pressurized &gt; 0
            </test>
            <output>fcs/mfs-right-inboard-powered</output>
        </switch>
        <kinematic name="MFS6 Control">
            <input>fcs/mfs-right-inboard-powered</input>
            <traverse>
                <setting>
                    <position> 0 </position>
                    <time>     0 </time>
                </setting>
                <setting>
                    <position> 1 </position>
                    <time>     1 </time>
                </setting>
            </traverse>
            <output>fcs/mfs6-pos-norm</output>
        </kinematic>
    </channel>-->

    <channel name="FADEC">
        <pure_gain name="fcs/throttle-pos-norm[0]">
            <input>/fadec/throttle-cmd[0]</input>
            <gain>1.0</gain>
        </pure_gain>

        <pure_gain name="fcs/throttle-pos-norm[1]">
            <input>/fadec/throttle-cmd[1]</input>
            <gain>1.0</gain>
        </pure_gain>
    </channel>

	<!--<channel name="Brakes">
		<summer name="fcs/brake-power-outboard-psi">
            <input>/systems/hydraulic/system[0]/pressure-psi</input>
        </summer>

		<pure_gain name="fcs/brake-power-outboard-norm">
            <gain>0.0001666667</gain>
            <input>fcs/brake-power-outboard-psi</input>
        </pure_gain>

		<summer name="fcs/brake-power-inboard-psi">
            <input>/systems/hydraulic/system[1]/pressure-psi</input>
        </summer>

		<pure_gain name="fcs/brake-power-inboard-norm">
            <gain>0.0001666667</gain>
            <input>fcs/brake-power-inboard-psi</input>
        </pure_gain>

		<summer name="fcs/emer-brake-power">
            <input>/systems/hydraulic/system[0]/emergency-accumulator</input>
            <input>/systems/hydraulic/system[1]/emergency-accumulator</input>
        </summer>

		<pure_gain name="fcs/emer-brake-power-norm">
            <gain>4</gain>
            <input>fcs/emer-brake-power</input>
			<clipto>
				<min>0</min>
				<max>1</max>
			</clipto>
        </pure_gain>

		<actuator name="fcs/brake-left">
			<input>/controls/gear/brake-left</input>
			<rate_limit>2</rate_limit>
		</actuator>

		<actuator name="fcs/brake-right">
			<input>/controls/gear/brake-right</input>
			<rate_limit>2</rate_limit>
		</actuator>

		<fcs_function name="fcs/left-inboard-brake-input-norm">
			<function>
				<product>
					<property>fcs/brake-power-inboard-norm</property>
					<max>
						<property>fcs/brake-left</property>
						<product>
							<property>/autopilot/autobrake/output-brake</property>
							<property>/autopilot/autobrake/engaged</property>
						</product>
						<property>/controls/gear/brake-parking</property>
					</max>
				</product>
			</function>
		</fcs_function>
		<fcs_function name="fcs/left-outboard-brake-input-norm">
			<function>
				<product>
					<property>fcs/brake-power-outboard-norm</property>
					<max>
						<property>fcs/brake-left</property>
						<product>
							<property>/autopilot/autobrake/output-brake</property>
							<property>/autopilot/autobrake/engaged</property>
						</product>
						<property>/controls/gear/brake-parking</property>
					</max>
				</product>
			</function>
		</fcs_function>
		<fcs_function name="fcs/left-brake-input-emer">
			<function>
				<product>
					<property>fcs/emer-brake-power-norm</property>
                    <property>/controls/gear/brake-parking</property>
				</product>
			</function>
		</fcs_function>

        <summer name="fcs/left-inboard-brake-input">
            <input>fcs/left-inboard-brake-input-norm</input>
            <input>fcs/left-brake-input-emer</input>
        </summer>

		<actuator>
			<input>fcs/left-inboard-brake-input</input>
			<rate_limit>10</rate_limit>
            <output>fcs/left-inboard-brake</output>
		</actuator>

        <summer name="fcs/left-outboard-brake-input">
            <input>fcs/left-outboard-brake-input-norm</input>
            <input>fcs/left-brake-input-emer</input>
        </summer>

		<actuator>
			<input>fcs/left-outboard-brake-input</input>
			<rate_limit>10</rate_limit>
            <output>fcs/left-outboard-brake</output>
		</actuator>

        <summer name="fcs/left-brake-cmd-norm">
            <input>fcs/left-inboard-brake</input>
            <input>fcs/left-outboard-brake</input>
            <input>/services/chocks</input>
			<clipto>
				<min>0</min>
				<max>1</max>
			</clipto>
        </summer>

		<fcs_function name="fcs/right-inboard-brake-input-norm">
			<function>
				<product>
					<property>fcs/brake-power-inboard-norm</property>
					<max>
						<property>fcs/brake-right</property>
						<product>
							<property>/autopilot/autobrake/output-brake</property>
							<property>/autopilot/autobrake/engaged</property>
						</product>
						<property>/controls/gear/brake-parking</property>
					</max>
				</product>
			</function>
		</fcs_function>
		<fcs_function name="fcs/right-outboard-brake-input-norm">
			<function>
				<product>
					<property>fcs/brake-power-outboard-norm</property>
					<max>
						<property>fcs/brake-right</property>
						<product>
							<property>/autopilot/autobrake/output-brake</property>
							<property>/autopilot/autobrake/engaged</property>
						</product>
						<property>/controls/gear/brake-parking</property>
					</max>
				</product>
			</function>
		</fcs_function>
		<fcs_function name="fcs/right-brake-input-emer">
			<function>
				<product>
					<property>fcs/emer-brake-power-norm</property>
                    <property>/controls/gear/brake-parking</property>
				</product>
			</function>
		</fcs_function>

        <summer name="fcs/right-inboard-brake-input">
            <input>fcs/right-inboard-brake-input-norm</input>
            <input>fcs/right-brake-input-emer</input>
        </summer>

		<actuator>
			<input>fcs/right-inboard-brake-input</input>
			<rate_limit>10</rate_limit>
            <output>fcs/right-inboard-brake</output>
		</actuator>

        <summer name="fcs/right-outboard-brake-input">
            <input>fcs/right-outboard-brake-input-norm</input>
            <input>fcs/right-brake-input-emer</input>
        </summer>

		<actuator>
			<input>fcs/right-outboard-brake-input</input>
			<rate_limit>10</rate_limit>
            <output>fcs/right-outboard-brake</output>
		</actuator>

        <summer name="fcs/right-brake-cmd-norm">
            <input>fcs/right-inboard-brake</input>
            <input>fcs/right-outboard-brake</input>
            <input>/services/chocks</input>
			<clipto>
				<min>0</min>
				<max>1</max>
			</clipto>
        </summer>

	</channel>-->
</flight_control>
